# Задание 1
x := 2
n := 2
y := (sqrt(x^3 + n) + cos(|n*x - 1|)^2)/(nthroot(x^5 + sin(x) + n, 4)*cos(π/4*(x + n)))
y = -1.70417
# Задание 2
x := 7
y := 10
z := -3
p := if(x > y, sin(x) + 3*|y| - z^2, (y + 3)/sqrt(z^2 + 1)*ln(|x + 1|)) = 8.5485
q := if((x > y) and (x < 1), cos(x) + 2*|y + 1| - z, (x*y + 3)/sqrt(y^2 + 5)) = 7.12407
w := if((x < y) or (y ≥ 10), x^2 + 2*(y*x + 1) - z, (x^-3*y^2 + 3)*sqrt(z^2 + 7)) = 194
# Задание 3
Δx := 0.4
x := -2, -2 + Δx .. 2
n := 3
f(x) := (x^2 - n*x + sin(x))*sqrt(|x - cos(n*x)|)
x = [-2; -1.6; -1.2; -0.8; -0.4; 0; 0.4; 0.8; 1.2; 1.6; 2]
f(x) = [15.6407; 8.26243; 2.26215; 0.581154; 0.847445; 0; -0.126223; -1.29279; -1.77811; -1.52552; -1.11221]
# Задание 4
n := 2
a := -3*n
b := 3*n
A := round(runif(3, a, b)) = [1; -4; 1]
Arow := transpose(A) = [1, -4, 1]
B := round(runif(3, a, b)) = [-3; 1; 1]
Brow := transpose(B) = [-3, 1, 1]
C := round(runif(3, a, b)) = [0; 3; 1]
Crow := transpose(C) = [0, 3, 1]
# Вычисления
# с шаблонами:
s := A*B = -8
V := vectorize(B)×vectorize(C) = [-2; 3; -9]
w := (vectorize(A)×vectorize(B))*vectorize(C) = -23
# без шаблонов:
s := A[0]*B[0] + A[1]*B[1] + A[2]*B[2] = -6
V := [B[1]*C[2] - B[2]*C[1]; -(B[0]*C[2] - B[2]*C[0]); B[0]*C[1] - B[1]*C[0]] = [-2; 3; -9]
prem := [i, j, k; A[0], A[1], A[2]; B[0], B[1], B[2]]  # error: Эта переменная не определена. Проверьте правильность установки обозначения.; disabled
AxB := [A[1]*B[2] - A[2]*B[1]; A[0]*B[2] - A[2]*B[0]; A[0]*B[1] - A[1]*B[0]]
w := AxB[0]*C[0] - AxB[1]*C[1] + AxB[2]*C[2] = -23
# Длина вектора
vecLen(v) := sqrt(v*v)
lenA := vecLen(A) = 4.24264
lenB := vecLen(B) = 3.31662
lenC := vecLen(C) = 3.16228
maxLen := max(lenA, max(lenB, lenC)) = 4.24264
ans := if(maxLen == lenA, "Это А", if(maxLen == lenB, "Это B", "Это С")) = "Это А"
# Матрица
n := 5
a := -3*n
b := 3*n
N := 9
Msample := runif(10, a, b)
M := Msample*transpose(Msample)
i := 0 .. N
j := 0 .. N
M[i, j] := round(a + (b - a)*rnd(1))
M = [
    -11, 9, 3, -13, 5, -12, -8, 13, 5, 0;
    0, 0, 6, 3, -15, -12, 11, 7, -4, 2;
    14, -10, -11, 14, -14, -13, -11, 11, 7, -15;
    6, -8, -10, -5, -4, 9, 1, 9, -11, -3;
    -11, -13, 2, 1, -6, 9, -6, 12, 7, -4;
    -8, -8, 1, -13, 1, -12, 12, -11, 13, -14;
    -5, -3, 13, 1, 6, -7, 1, -3, 3, 6;
    -2, -15, 3, 2, -8, -15, -13, 11, 9, 6;
    1, -11, 7, -14, 4, -12, 13, -7, 14, -6;
    -4, -8, -8, 12, 12, -13, -10, 8, -9, -15
]
Sum := sum(sum(M[i, j], j), i) = -159
SumOtr := 0
SumPol := 0
SumOtr := sum(sum(if(M[i, j] < 0, M[i, j], 0), j), i) = -484
SumPol := sum(sum(if(M[i, j] > 0, M[i, j], 0), j), i) = 325
X := transpose(M)[0, :] = [-11, 0, 14, 6, -11, -8, -5, -2, 1, -4]
Y := M[N, :] = [-4, -8, -8, 12, 12, -13, -10, 8, -9, -15]
XY := X*transpose(Y) = -36
# Задание 5
y(x) := e^(-(|x|/3))*cos(x)
x := -3*π, -3*π + 0.1 .. 3*π
# [plot: y(x) vs x]
# Задание 6
f(x) := if(x < 0, e^x*x^3, e^(-x)*x^3)
Δx := 0.25
x := -9, -9 + Δx .. 9
# [plot: f(x) vs x]
x = [
    -9; -8.75; -8.5; -8.25; -8; -7.75; -7.5; -7.25; -7; -6.75
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]
f(x) = [
    -0.0899657; -0.106157; -0.124955; -0.146701; -0.171757; -0.200504; -0.233332; -0.270632; -0.312776; -0.3601
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]
# Задание 7
g(x) := sqrt(|x|)*sin(x)
Δx := π/4
x := -2*π, -2*π + Δx .. 2*π
X := vec(x)
Y := g(X)
WRITEFILE("X.txt", X) = [-6.28319; -5.49779; -4.71239; -3.92699; -3.14159; -2.35619; -1.5708; -0.785398; 0; 0.785398; 1.5708; 2.35619; 3.14159; 3.92699; 4.71239; 5.49779; 6.28319]
WRITEFILE("Y.txt", Y) = [0; 2.8164; 3.983; 2.8164; 0; -2.8164; -3.983; -2.8164; 0; 2.8164; 3.983; 2.8164; 0; -2.8164; -3.983; -2.8164; 0]
XX := READFILE("X.txt", "\n") = [-6.28319; -5.49779; -4.71239; -3.92699; -3.14159; -2.35619; -1.5708; -0.785398; 0; 0.785398; 1.5708; 2.35619; 3.14159; 3.92699; 4.71239; 5.49779; 6.28319]
YY := READFILE("Y.txt", "\n") = [0; 2.8164; 3.983; 2.8164; 0; -2.8164; -3.983; -2.8164; 0; 2.8164; 3.983; 2.8164; 0; -2.8164; -3.983; -2.8164; 0]
# [plot: YY vs XX]
# Задание 8
q(x) := e^(-x^2)
x := -3, -2.9 .. 3
# [plot: q(x), d/dx(q(x)) vs x]
# Задание 9
a(x, y) := sqrt(x^2 + y^2)
f(x, y) := if(a(x, y) == 0, 1, sin(a(x, y))/a(x, y))
# [3D plot: f]
# Задание 10
f(x) := x^2 + (x - 2)*sin(x) - 5
x := -5, -4.9 .. 5
# [plot: f(x) vs x]
x0 := -2
x1 := root(f(x0), x0) = -1.32936
x0 := 2
x2 := root(f(x0), x0) = 2.19967
проверка
f(x1) = 1.1382e-11
f(x2) = 3.52607e-13
# Задание 11
f(x) := x^2 + x*sin(2*x) - (x - 5)*cos(x)
x := -4, -3.9 .. 4
# [plot: f(x) vs x]
x1 := root(f(x), x, -4, -2.5) = -2.97354
x2 := root(f(x), x, -2.5, -1) = -1.93283
проверка
f(x1) = 1.77636e-15
f(x2) = 1.33227e-15
# Задание 12 | отдельный файл
# Задание 13
n := 5
# матричный метод
A := [n, n + 1, n + 2; n - 3, n - 2, n; n - 1, n, n + 1] = [5, 6, 7; 2, 3, 5; 4, 5, 6]
B := [6*n + 8; 6*n - 7; 6*n + 2] = [38; 23; 32]
A*X == B
X := A^-1*B = [1; 2; 3]  # проверка
A*X = [38; 23; 32]
# использование Given ... Find ...
solve block
    # guess values
    n := 2
    x := 99
    y := 0
    z := 0
    # constraints
    n*x + (n + 1)*y + (n + 2)*z == 6*n + 8
    (n - 3)*x + (n - 2)*y + n*z == 6*n - 7
    (n - 1)*x + n*y + (n + 1)*z == 6*n + 2
    # solver
    [xgf; ygf; zgf] := find(x, y, z) = [1; 2; 3]
end solve block
проверка
A*[xgf; ygf; zgf] = [38; 23; 32]
# Задание 14
f1(x, y) := x^2/81 + y^2/16 - 1
f2(x, y) := (x - 9)^2 + (y - 2)^2 - 25
solve block
    # guess values
    x := 0
    y := -4
    # constraints
    x^2/81 + y^2/16 == 1
    (x - 9)^2 + (y - 2)^2 == 25
    # solver
    T1 := find(x, y) = [6.9308; -2.55175]
end solve block
solve block
    # guess values
    x := 0
    y := 4
    # constraints
    x^2/81 + y^2/16 == 1
    (x - 9)^2 + (y - 2)^2 == 25
    # solver
    T2 := find(x, y) = [4.23934; 3.52845]
end solve block
x := -12, -11.99 .. 12
y1_p(x) := 4*sqrt(1 - x^2/81)
y2_p(x) := 2 + sqrt(25 - (x - 9)^2)
y1_m(x) := -4*sqrt(1 - x^2/81)
y2_m(x) := 2 - sqrt(25 - (x - 9)^2)
# [plot: y1_p(x), y1_m(x), y2_p(x), y2_m(x) vs x]
T1 = [6.9308; -2.55175]
T2 = [4.23934; 3.52845]
# Задание 15
f(x) := x*sin(x)
x := 0, 0.1 .. 10
# [plot: f(x) vs x]
x := 2
xma1 := Maximize(f, x) = 2.02876
x := 8
xma2 := Maximize(f, x) = 7.97867
x := 5
xmi1 := Minimize(f, x) = 4.91318
x := 10
xmi2 := Minimize(f, x) = 11.0855
