# Задание 1
x := 2
n := 2
y := (sqrt(x^3 + n) + cos(|n*x - 1|)^2)/(nthroot(x^5 + sin(x) + n, 4)*cos(π/4*(x + n)))
y = -1.70417
# Задание 2
x := 7
y := 10
z := -3
p :=
    if x > y
        sin(x) + 3*|y| - z^2
    else if x ≤ y
        (y + 3)/sqrt(z^2 + 1)*ln(|x + 1|)
q :=
    if (x > y) and (x < 1)
        cos(x) + 2*|y + 1| - z
    else
        (x*y + 3)/sqrt(y^2 + 5)
w :=
    if (x < y) or (y ≥ 10)
        x^2 + 2*(y*x + 1) - z
    else
        (x^-3*y^2 + 3)*sqrt(z^2 + 7)
p = 8.5485
q = 7.12407
w = 194
# Задание 3
Δx := 0.4
x := -2, -2 + Δx .. 2
n := 3
f(x) := (x^2 - n*x + sin(x))*sqrt(|x - cos(n*x)|)
x = [-2; -1.6; -1.2; -0.8; -0.4; 0; 0.4; 0.8; 1.2; 1.6; 2]
f(x) = [15.6407; 8.26243; 2.26215; 0.581154; 0.847445; 0; -0.126223; -1.29279; -1.77811; -1.52552; -1.11221]
ORIGIN := 0
# Задание 4
n := 5
a := -3*n
b := 3*n
n := 2
a := -3*n
b := 3*n
N := 9
A := runif(3, a, b) = [2.32823; 1.85872; -4.82023]
Arow := transpose(A) = [2.32823, 1.85872, -4.82023]
Msample := runif(10, a, b)
B := runif(3, a, b) = [5.07119; -5.69246; 1.62784]
Brow := transpose(B) = [5.07119, -5.69246, 1.62784]
M := Msample*transpose(Msample)
C := runif(3, a, b) = [-4.75689; 1.19437; -5.75256]
Crow := transpose(C) = [-4.75689, 1.19437, -5.75256]
i := 0 .. N
j := 0 .. N
M[i, j] := round(a + (b - a)*rnd(1))
s := A*B = -6.62035
V := B×C = [30.802; 21.4289; -21.0215]
w := (A×B)*C = 212.873
M = [
    6, -6, 2, -1, -5, -2, 4, -4, 3, 3;
    -1, 0, -2, 5, 4, -1, 1, 5, 0, -6;
    -1, -3, 1, 5, -1, 2, 3, -2, -5, -2;
    -2, 5, -1, 3, -2, -4, -5, -1, 3, 0;
    -5, -4, 6, 4, 0, -1, -5, -5, -4, -3;
    4, 1, 4, -5, -4, -4, 5, -3, -5, -5;
    6, 4, 4, 4, -5, -3, 2, -1, 3, -2;
    2, 1, -3, 1, 1, -1, 2, -4, 0, 2;
    5, -1, 4, -2, -6, -2, -2, 5, 0, 4;
    3, 2, -3, 6, -2, -3, -1, 0, -3, -1
]
vecLen(v) := sqrt(v*v)
lenA := vecLen(A) = 5.66658
lenB := vecLen(B) = 7.79557
lenC := vecLen(C) = 7.55953
maxLen := max(lenA, max(lenB, lenC)) = 7.79557
ans :=
    if maxLen == lenA
        "Это А"
    else if maxLen == lenB
        "Это B"
    else
        "Это C"
    = "Это B"
Sum := sum(sum(M[i, j], j), i) = -15
SumOtr := 0
SumPol := 0
sums := {
    for m ∈ 0 .. N
        for n ∈ 0 .. N
            if M[m, n] > 0
                SumPol ← SumPol + M[m, n]
            else
                SumOtr ← SumOtr + M[m, n]
}*{
    return [SumPol; SumOtr]
}
S := sums
SumPol := S[0] = 140
SumOtr := S[1] = -155
X := transpose(M)[0, :] = [6, -1, -1, -2, -5, 4, 6, 2, 5, 3]
Y := M[N, :] = [3, 2, -3, 6, -2, -3, -1, 0, -3, -1]
XY := transpose(X)*transpose(Y) = -19
# Задание 5
y(x) := e^(-(|x|/3))*cos(x)
x := -3*π, -3*π + 0.1 .. 3*π
# [plot: y(x) vs x]
# Задание 6
f(x) :=
    if x < 0
        e^x*x^3
    else if x ≥ 0
        e^(-x)*x^3
Δx := 0.25
x := -9, -9 + Δx .. 9
# [plot: f(x) vs x]
f(x) = [
    -0.0899657; -0.106157; -0.124955; -0.146701; -0.171757; -0.200504; -0.233332; -0.270632; -0.312776; -0.3601
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]
# Задание 7
g(x) := sqrt(|x|)*sin(x)
Δx := π/4
x := -2*π, -2*π + Δx .. 2*π
X := vec(x)
Y := g(vec(x))
WRITEFILE("X.txt", X) = [-6.28319; -5.49779; -4.71239; -3.92699; -3.14159; -2.35619; -1.5708; -0.785398; 0; 0.785398; 1.5708; 2.35619; 3.14159; 3.92699; 4.71239; 5.49779; 6.28319]
WRITEFILE("Y.txt", Y) = [0; 2.8164; 3.983; 2.8164; 0; -2.8164; -3.983; -2.8164; 0; 2.8164; 3.983; 2.8164; 0; -2.8164; -3.983; -2.8164; 0]
XX := READFILE("X.txt", "\n") = [-6.28319; -5.49779; -4.71239; -3.92699; -3.14159; -2.35619; -1.5708; -0.785398; 0; 0.785398; 1.5708; 2.35619; 3.14159; 3.92699; 4.71239; 5.49779; 6.28319]
YY := READFILE("Y.txt", "\n") = [0; 2.8164; 3.983; 2.8164; 0; -2.8164; -3.983; -2.8164; 0; 2.8164; 3.983; 2.8164; 0; -2.8164; -3.983; -2.8164; 0]
# [plot: YY vs XX]
# Задание 8
q(x) := e^(-x^2)
x := -3, -2.9 .. 3
# [plot: q(x), d/dx(q(x)) vs x]
# Задание 9
a(x, y) := sqrt(x^2 + y^2)
x := -15 .. 15
y := -15 .. 15
f(x, y) :=
    if a(x, y) == 0
        1
    else
        sin(a(x, y))/a(x, y)
# [3D plot: f(x, y)]
# Задание 10
f(x) := x^2 + (x - 2)*sin(x) - 5
x := -5, -4.9 .. 5
# [plot: f(x) vs x]
x_ := -2
x1 := root(f(x_), x_) = -1.32936
x_ := 2
x2 := root(f(x_), x_) = 2.19967
проверка
f(x1) = 1.1382e-11
f(x2) = 3.52607e-13
# Задание 11
f(x) := x^2 + x*sin(2*x) - (x - 5)*cos(x)
x := -4, -3.9 .. 4
# [plot: f(x) vs x]
x1 := root(f(x), x, -4, -2.5) = -2.97354
x2 := root(f(x), x, -2.5, -1) = -1.93283
проверка
f(x1) = 1.77636e-15
f(x2) = 1.33227e-15
# Задание 12
# отдельный файл
# Задание 13
n := 2
# матричный метод
A := [n, n + 1, n + 2; n - 3, n - 2, n; n - 1, n, n + 1] = [2, 3, 4; -1, 0, 2; 1, 2, 3]
B := [6*n + 8; 6*n - 7; 6*n + 2] = [20; 5; 14]
A*X == B
X := A^-1*B = [1; 2; 3]
проверка
A*X = [20; 5; 14]
# использование Given ... Find ...
solve block
    # guess values
    n := 2
    x := 0
    y := 0
    z := 0
    # constraints
    n*x + (n + 1)*y + (n + 2)*z == 6*n + 8
    (n - 3)*x + (n - 2)*y + n*z == 6*n - 7
    (n - 1)*x + n*y + (n + 1)*z == 6*n + 2
    # solver
    [xgf; ygf; zgf] := find(x, y, z) = [1; 2; 3]
end solve block
проверка
A*[xgf; ygf; zgf] = [20; 5; 14]
# Задание 14
f1(x, y) := x^2/81 + y^2/16 - 1
f2(x, y) := (x - 9)^2 + (y - 2)^2 - 25
solve block
    # guess values
    x := 0
    y := -4
    # constraints
    x^2/81 + y^2/16 == 1
    (x - 9)^2 + (y - 2)^2 == 25
    # solver
    T1 := find(x, y) = [6.9308; -2.55175]
end solve block
# [3D plot: f2(x, y), f1(x, y)]
solve block
    # guess values
    x := 0
    y := 4
    # constraints
    x^2/81 + y^2/16 == 1
    (x - 9)^2 + (y - 2)^2 == 25
    # solver
    T2 := find(x, y) = [4.23934; 3.52845]
end solve block
T1 = [6.9308; -2.55175]
T2 = [4.23934; 3.52845]
# Задание 15
f(x) := x*sin(x)
x := 0, 0.1 .. 10
# [plot: f(x) vs x]
x := 2
xma1 := Maximize(f, x) = 2.02876
x := 8
xma2 := Maximize(f, x) = 7.97867
x := 5
xmi1 := Minimize(f, x) = 4.91318
