solve block
    # guess values
    n := 2
    # constraints
    n*x + (n + 1)*y + (n + 2)*z == 6*n + 8
    (n - 3)*x + (n - 2)*y + n*z == 6*n - 7
    (n - 1)*x + n*y + (n + 1)*z == 6*n + 2
    # solver
    [xR; yR; zR] := find(x, y, z)  # error: Эта переменная не определена. Проверьте правильность установки обозначения.
    # x | y | z
end solve block
