# Задание 1
# Координаты вершин:
Ax := -2
Bx := -3
Cx := 0
Dx := 3
Ex := 2
Fx := -2
Hx := 2
Ay := -4
By := 0
Cy := 4
Dy := 0
Ey := -4
Fy := 0
Hy := 0
X := transpose([Bx, Cx, Dx, Bx, Hx, Ex, Ax, Fx])
Y := transpose([By, Cy, Dy, By, Hy, Ey, Ay, Fy])
# Левый верхний угол:
Xl := min(X) = -3
Yh := max(Y) = 4
# Правый нижний угол:
Xh := max(X) = 3
Yl := min(Y) = -4
# Ширина области отображения в мировых координатах:
Δx := Xh - Xl = 6
# Высота области отображения в мировых координатах:
Δy := Yh - Yl = 8
# Координаты левого верхнего угла области Dw:
Xlw := 100
Ylw := 200
# Координаты правого нижнего угла области Dw:
Xhw := 400
Yhw := 500
# Ширина области отображения в области Dw:
Δxw := Xhw - Xlw = 300
# Высота области отображения в области Dw:
Δyw := Yhw - Ylw = 300
kx := Δxw/Δx = 50
ky := Δyw/Δy = 37.5
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# матрица преобразования
# Матрица пересчета из МСК в ОСК:
T := [kx, 0, Xlw - kx*Xl; 0, -ky, Yhw + ky*Yl; 0, 0, 1]
# Координаты в ОСК:
[Axw; Ayw; z] := T*[Ax; Ay; 1] = [150; 500; 1]
[Bxw; Byw; z] := T*[Bx; By; 1] = [100; 350; 1]
[Cxw; Cyw; z] := T*[Cx; Cy; 1] = [250; 200; 1]
[Dxw; Dyw; z] := T*[Dx; Dy; 1] = [400; 350; 1]
[Exw; Eyw; z] := T*[Ex; Ey; 1] = [350; 500; 1]
[Fxw; Fyw; z] := T*[Fx; Fy; 1] = [150; 350; 1]
[Hxw; Hyw; z] := T*[Hx; Hy; 1] = [350; 350; 1]
Xw := transpose([Bxw, Cxw, Dxw, Bxw, Hxw, Exw, Axw, Fxw])
Yw := transpose([Byw, Cyw, Dyw, Byw, Hyw, Eyw, Ayw, Fyw])
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# Задание 2
f(x) := sin(π*x)*sqrt(|x|)
x1 := -6
x2 := 6
Δx := 0.1
# Левый верхний угол Dw:
Xlw := 100
Ylw := 200
# Правый нижний угол Dw:
Xhw := 800
Yhw := 900
# Ширина области отображения в области Dw:
Δxw := Xhw - Xlw = 700
# Высота области отображения в области Dw:
Δyw := Yhw - Ylw = 700
N := round((x2 - x1)/Δx) = 120
i := 0 .. N
X[i] := x1 + Δx*i
Y[i] := f(X[i])
Z[i] := 1
# Левый верхний угол МСК:
Xl := min(X) = -6
Yh := max(Y) = 2.34521
# Правый нижний угол МСК:
Xh := max(X) = 6
Yl := min(Y) = -2.34521
# Ширина области отображения МСК:
Δx := Xh - Xl = 12
# Высота области отображения МСК:
Δy := Yh - Yl = 4.69042
kx := Δxw/Δx = 58.3333
ky := Δyw/Δy = 149.241
T := [kx, 0, Xlw - kx*Xl; 0, -ky, Yhw + ky*Yl; 0, 0, 1]
M := stack(transpose(X), transpose(Y), transpose(Z))
Mw := T*M
Xw := transpose(Mw)[:, 0]
Yw := transpose(Mw)[:, 1]
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