Ax := 4
Bx := 4
Cx := 6
Dx := 6
Ay := 2
By := 8
Cy := 7
Dy := 3
X := transpose([Ax, Bx, Cx, Dx, Ax])
Y := transpose([Ay, By, Cy, Dy, Ay])
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# по уравнению y=kx+b находим коодринаты пересечения AD и BC в точке P
# Уравнение прямой BC
k1 := 0
b1 := 0
Given
By == k1*Bx + b1
Cy == k1*Cx + b1
[k11; b11] := Find(k1, b1)
# Уравнение прямой AD
k2 := 0
b2 := 0
Given
Ay == k2*Ax + b2
Dy == k2*Dx + b2
[k22; b22] := Find(k2, b2)
# Находим точку (P) пересечения прямых
x := 0
y := 0
Given
y == k11*x + b11  # прямая BC
y == k22*x + b22  # прямая AD
[Px; Py] := Find(x, y)
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# Находим координаты относительно точки Р
P := [Ax, Bx, Cx, Dx; Ay, By, Cy, Dy; 1, 1, 1, 1] = [4, 4, 6, 6; 2, 8, 7, 3; 1, 1, 1, 1]
# Параллельный сдвиг системы координат, чтобы совершать поворот вокруг P, а не начала МСК
# (P совпадает с началом координат)
Ts(dx, dy) := [1, 0, -dx; 0, 1, -dy; 0, 0, 1]
P1 := Ts(Px, Py)*P = [-6, -6, -4, -4; -3, 3, 2, -2; 1, 1, 1, 1]
# Угол поворота (отрицательный, так как по часовой стрелке):
x := -90
x_rad := x*π/180 = -1.5708
# Поворотная матрица и поворот:
R(x) := [cos(x), -sin(x), 0; sin(x), cos(x), 0; 0, 0, 1]
P2 := R(x_rad)*P1 = [-3, 3, 2, -2; 6, 6, 4, 4; 1, 1, 1, 1]
# Обратное преобразование  для отображения фигуры в начальной системе координат:
P3 := Ts(-Px, -Py)*P2 = [7, 13, 12, 8; 11, 11, 9, 9; 1, 1, 1, 1]
Pfinal := transpose(stack(transpose(P3), transpose(P3[:, 0]))) = [7, 13, 12, 8, 7; 11, 11, 9, 9, 11; 1, 1, 1, 1, 1]
Xt := transpose(Pfinal)[:, 0]
Yt := transpose(Pfinal)[:, 1]
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