# x | y | z
A := transpose([5, 0, 0, 1])
B := transpose([0, 0, 0, 1])
C := transpose([0, 5, 0, 1])
A1 := transpose([1, 0, 5, 1])
B1 := transpose([0, 0, 5, 1])
C1 := transpose([0, 1, 5, 1])
Coords := augment(A, B, C, A1, B1, C1) = [5, 0, 0, 1, 0, 0; 0, 0, 5, 0, 0, 1; 0, 0, 0, 5, 5, 5; 1, 1, 1, 1, 1, 1]
Camera := [10; 315; 45]
r := Camera[0]  # - расстояние от начала координат до точки
φ := Camera[1]*π/180
# - угол, образованный положительным направлением
# оси OX и проекцией точки P на плоскостьXOY
θ := Camera[2]*π/180  # - угол, образованный положительным направлением оси OZ и отрезком OP
Mv := [
    -sin(φ), cos(φ), 0, 0;
    -cos(θ)*cos(φ), -cos(θ)*sin(φ), sin(θ), 0;
    -sin(θ)*cos(φ), -sin(θ)*sin(φ), -cos(θ), r;
    0, 0, 0, 1
]  # - матрица пересчёта координат из мировых в видовые
V_Coords := Mv*Coords = [
    3.53553, 0, 3.53553, 0.707107, 0, 0.707107;
    -2.5, 0, 2.5, 3.03553, 3.53553, 4.03553;
    7.5, 10, 12.5, 5.96447, 6.46447, 6.96447;
    1, 1, 1, 1, 1, 1
]
# левый
# верхний
# угол
# правый
# нижний
# угол
Xwl := 200
Xwh := 700
Ywl := 100
Ywh := 500
Xl := min(transpose(V_Coords)[:, 0])
Xh := max(transpose(V_Coords)[:, 0])
Yl := min(transpose(V_Coords)[:, 1])
Yh := max(transpose(V_Coords)[:, 1])
ΔX := Xh - Xl
ΔXw := Xwh - Xwl
kx := ΔXw/ΔX
ΔY := Yh - Yl
ΔYw := Ywh - Ywl
ky := ΔYw/ΔY
Ts := [kx, 0, Xwl - kx*Xl; 0, -ky, Ywh + ky*Yl; 0, 0, 1]  # - матрица пересчёта из видовой системы координат в ОСК
V_xy := stack(transpose(transpose(V_Coords)[:, 0]), transpose(transpose(V_Coords)[:, 1]), [1, 1, 1, 1, 1, 1]) = [
    3.53553, 0, 3.53553, 0.707107, 0, 0.707107;
    -2.5, 0, 2.5, 3.03553, 3.53553, 4.03553;
    1, 1, 1, 1, 1, 1
]  # - получение координат для отображение на 2D графике
Vw_xy := Ts*V_xy = [700, 200, 700, 300, 200, 300; 500, 346.99, 193.981, 161.204, 130.602, 100; 1, 1, 1, 1, 1, 1]
[xA, xB, xC, xA1, xB1, xC1; yA, yB, yC, yA1, yB1, yC1; s1, s1, s1, s1, s1, s1] := Vw_xy
X := transpose([xA, xB, xC, xA, xA1, xB1, xB, xB1, xC1, xC, xC1, xA1])
Y := transpose([yA, yB, yC, yA, yA1, yB1, yB, yB1, yC1, yC, yC1, yA1])
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Rc := [r*sin(θ)*cos(φ); r*sin(θ)*sin(φ); r*cos(θ)]
# - декардовы координаты камеры, вектора
# положения камеры в пространстве
# вычисляем векторы нормали для каждой грани (5):
# 1) грань AA1C1C:
AC := [C[0]; C[1]; C[2]] - [A[0]; A[1]; A[2]]
AA1 := [A1[0]; A1[1]; A1[2]] - [A[0]; A[1]; A[2]]
N_AA1C1C := AC×AA1
if(N_AA1C1C*Rc > 0, "AA1C1C: ВИДНА", "AA1C1C: НЕ ВИДНА") = "AA1C1C: ВИДНА"
# 2) грань ABC:
AB := [B[0]; B[1]; B[2]] - [A[0]; A[1]; A[2]]
N_ABC := AB×AC
if(N_ABC*Rc > 0, "ABC: ВИДНА", "ABC: НЕ ВИДНА") = "ABC: НЕ ВИДНА"
# 3) грань ABB1A1:
N_ABB1A1 := AA1×AB
if(N_ABB1A1*Rc > 0, "ABB1A1: ВИДНА", "ABB1A1: НЕ ВИДНА") = "ABB1A1: ВИДНА"
# 4) грань A1B1C1:
A1C1 := [C1[0]; C1[1]; C1[2]] - [A1[0]; A1[1]; A1[2]]
A1B1 := [B1[0]; B1[1]; B1[2]] - [A1[0]; A1[1]; A1[2]]
N_A1B1C1 := A1C1×A1B1
if(N_A1B1C1*Rc > 0, "A1B1C1: ВИДНА", "A1B1C1: НЕ ВИДНА") = "A1B1C1: ВИДНА"
# 5) грань BB1C1C:
BC := [C[0]; C[1]; C[2]] - [B[0]; B[1]; B[2]]
BB1 := [B1[0]; B1[1]; B1[2]] - [B[0]; B[1]; B[2]]
N_BB1C1C := BB1×BC
if(N_BB1C1C*Rc > 0, "BB1C1C: ВИДНА", "BB1C1B: НЕ ВИДНА") = "BB1C1B: НЕ ВИДНА"
# видимы грани : AA1C1C, ABB1A1, A1B1C1 - строим обход на основе этих граней
X := transpose([xA, xB, xB1, xA1, xA, xC, xC1, xB1, xA1, xC1])
Y := transpose([yA, yB, yB1, yA1, yA, yC, yC1, yB1, yA1, yC1])
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# Задаем положение секущей плоскости в МСК XYZ
# Угол между осью z и вектором нормали к секущей плоскости
# Угол наклона: | Точка пересечения с осью Z:
ϕ_grad := 25
ϕ := ϕ_grad/180*π
# Вектор нормали к секущей плоскости
N := transpose([0, sin(ϕ), cos(ϕ)])
# Координаты точки пересечения оси Z (ребра BB1) и секущей плоскости
x_0 := 0
y_0 := 0
z_0 := 3/4*Coords[:, 3][2] = 3.75
# Задаем параметры уравнения секущей плоскости
D := -(N[0]*x_0 + N[1]*y_0 + N[2]*z_0)  # - свободный член уравнения плоскости
A := submatrix(A, 0, 2, 0, 0)
A1 := submatrix(A1, 0, 2, 0, 0)
B := submatrix(B, 0, 2, 0, 0)
B1 := submatrix(B1, 0, 2, 0, 0)
C := submatrix(C, 0, 2, 0, 0)
C1 := submatrix(C1, 0, 2, 0, 0)
# Находим точку пересечения P1 секущей плоскости с ребром CС1
V1 := C  # - начало ребра
V2 := C1  # - конец ребра
ΔV := V2 - V1
t_CC1 := -((N*V1 + D)/(N*ΔV))
# - параметр пересечения
# (положение точки пересечения вдоль ребра)
# t = 0 - V1;
# t = 1 -- V2
# 0 < t < 1 -- нужная точка
# t > 1 или t < 0 -- точкая за гранями
Vсс1 := V1 + ΔV*t_CC1
# Координаты точки P1:
x_CC1 := Vсс1[0] = 0
y_CC1 := Vсс1[1] = 3.19003
z_CC1 := Vсс1[2] = 2.26247
# Находим точку пересечения P2 секущей плоскости с ребром AA1
V1 := A  # - начало ребра
V2 := A1  # - конец ребра
ΔV := V2 - V1
t_AA1 := -((N*V1 + D)/(N*ΔV))
# - параметр пересечения
# (положение точки пересечения вдоль ребра)
Vaa1 := V1 + ΔV*t_AA1
# Координаты точки P2
x_AA1 := Vaa1[0] = 2
y_AA1 := Vaa1[1] = 0
z_AA1 := Vaa1[2] = 3.75
# Находим точку пересечения P3 секущей плоскости с ребром BB1
V1 := B  # - начало ребра
V2 := B1  # - конец ребра
ΔV := V2 - V1
t_BB1 := -((N*V1 + D)/(N*ΔV))
# - параметр пересечения
# (положение точки пересечения вдоль ребра)
Vbb1 := V1 + ΔV*t_BB1
# Координаты точки P3
x_BB1 := Vbb1[0] = 0
y_BB1 := Vbb1[1] = 0
z_BB1 := Vbb1[2] = 3.75
# Матрица мировых коорднат точек P1, P2, P3 (сечение)
TR := [x_CC1, x_AA1, x_BB1; y_CC1, y_AA1, y_BB1; z_CC1, z_AA1, z_BB1; 1, 1, 1]
# Вычисляем координаты вершин треугольника сечения Р1, Р2, Р3 в ВСК
TR_V := Mv*TR
TR_V_xy := stack(transpose(transpose(TR_V)[:, 0]), transpose(transpose(TR_V)[:, 1]), transpose(transpose(TR_V)[:, 3]))
TR_W := Ts*TR_V_xy  # - оконные координаты
[x_p1, x_p2, x_p3; y_p1, y_p2, y_p3; q, q, q] := TR_W
# Массивы координат Х и У для рисования сечения пирамиды
XP := transpose([x_p1, x_p2, x_p3, x_p1])
X := transpose([xA, xB, xC, xA, xA1, xB1, xB, xB1, xC1, xC, xC1, xA1])
YP := transpose([y_p1, y_p2, y_p3, y_p1])
Y := transpose([yA, yB, yC, yA, yA1, yB1, yB, yB1, yC1, yC, yC1, yA1])
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# Сечение пирамиды без удаления невидимых граней
